с := 299792458
f := 15*10^9
εo := 8.85418782*10^-12
h := 0.3*10^-3
ε := 3.48
t := 35*10^-6
# Расчет согласующего трансформатора
R11 := 76.408
# Расчет компенсирующего конденсатора
XL11 := 65.537
Zt := sqrt(50*R11) = 61.8094
Zв := 50
# Quasistatic effective dielectric constant (Wheeler and Schneider)
BC := 377*π/(2*Zв*sqrt(ε)) = 6.34895
C11 := 1/(2*π*f*XL11) = 1.61898e-13
Bt := 377*π/(2*Zt*sqrt(ε)) = 5.13591
WdC := 2/π*(BC - 1 - ln(2*BC - 1) + (ε - 1)/(2*ε)*(ln(BC - 1) + 0.39 - 0.61/ε)) = 2.26863
Wdt := 2/π*(Bt - 1 - ln(2*Bt - 1) + (ε - 1)/(2*ε)*(ln(Bt - 1) + 0.39 - 0.61/ε)) = 1.58602
εeffC := (ε + 1)/2 + (ε - 1)/2*1/sqrt(1 + 12*1/WdC) = 2.73444
εefft := (ε + 1)/2 + (ε - 1)/2*1/sqrt(1 + 12*1/Wdt) = 2.66367
# Dispersion effect (Kobayashi)
# Dispersion effect (Kobayashi)
FСpis := с/(2*π*h*(0.75 + (0.75 - 0.332/εeffC^1.73)*WdC))*atan(ε*sqrt((εeffC - 1)/(ε - εeffC)))/sqrt(ε - εeffC) = 1.09961e11
Fpis := с/(2*π*h*(0.75 + (0.75 - 0.332/εefft^1.73)*Wdt))*atan(ε*sqrt((εefft - 1)/(ε - εefft)))/sqrt(ε - εefft) = 1.31071e11
mссc := 1 + 1.4/(1 + WdC)*(0.15 - 0.235*exp(-0.45*f/FСpis)) = 0.969586
mc := 1 + 1.4/(1 + Wdt)*(0.15 - 0.235*exp(-0.45*f/Fpis)) = 0.960369
# Strip thinkness correction Wheeler
moс := 1 + 1/(1 + sqrt(WdC)) + 0.32*(1/(1 + sqrt(WdC)))^3 = 1.41934
mo := 1 + 1/(1 + sqrt(Wdt)) + 0.32*(1/(1 + sqrt(Wdt)))^3 = 1.47035
mСС := moс*mссc = 1.37617
m := mo*mc = 1.41208
ΔW1 := t/π*ln(4*e/sqrt((t/h)^2 + (1/π/(Wdt + 1.10)))) = 3.78602e-5
εFС := ε - (ε - εeffC)/(1 + (f/FСpis)^mСС) = 2.7796
εF := ε - (ε - εefft)/(1 + (f/Fpis)^m) = 2.7002
ΔW2 := 1/2*ΔW1*(1 + 1/εF) = 2.59407e-5
lc := atan(C11*2*π*f*Zв)/(2*π*f/с*sqrt(1*εFС)) = 0.00124343
Wc := WdC*h = 0.00068059
Lt := π/2/(sqrt(εF)*2*π*f/с) = 0.00304069
λt := с/(f*sqrt(εF)) = 0.0121627
rc := C11/(εFС*εo*WdC) = 0.00289966
Wt := Wdt*h - ΔW2 = 0.000449864
# Taper (Kobayashi)
εtaper := (εF + εFС)/2 = 2.7399
Ltaper := 1/2*с/(f*εtaper) = 0.00364724
ltaper := Ltaper/10 = 0.000364724
Z1 := Zв*e^((ltaper/Ltaper)*ln(Zt/Zв)) = 51.0715
w1 := 631.389*10^-6
Z2 := Zв*e^((ltaper*2/Ltaper)*ln(Zt/Zв)) = 52.1659
w2 := 609.224*10^-6
w3 := 587.582*10^-6
Z3 := Zв*e^((ltaper*3/Ltaper)*ln(Zt/Zв)) = 53.2838
Z4 := Zв*e^((ltaper*4/Ltaper)*ln(Zt/Zв)) = 54.4257
w4 := 566.453*10^-6
w5 := 545.827*10^-6
Z5 := Zв*e^((ltaper*5/Ltaper)*ln(Zt/Zв)) = 55.592
w6 := 525.692*10^-6
Z6 := Zв*e^((ltaper*6/Ltaper)*ln(Zt/Zв)) = 56.7833
Z7 := Zв*e^((ltaper*7/Ltaper)*ln(Zt/Zв)) = 58.0001
w7 := 506.038*10^-6
w8 := 486.855*10^-6
Z8 := Zв*e^((ltaper*8/Ltaper)*ln(Zt/Zв)) = 59.2431
w9 := 468.134*10^-6
Z9 := Zв*e^((ltaper*9/Ltaper)*ln(Zt/Zв)) = 60.5126
Z10 := Zв*e^((ltaper*10/Ltaper)*ln(Zt/Zв)) = 61.8094
w10 := 449.864*10^-6
# Quasistatic effective dielectric constant (Wheeler and Schneider)
B1 := 377*π/(2*Z10*sqrt(ε)) = 5.13591
Wd1 := 2/π*(B1 - 1 - ln(2*B1 - 1) + (ε - 1)/(2*ε)*(ln(B1 - 1) + 0.39 - 0.61/ε)) = 1.58602
εeff1 := (ε + 1)/2 + (ε - 1)/2*1/sqrt(1 + 12*1/Wd1) = 2.66367
# Dispersion effect (Kobayashi)
Fpis1 := с/(2*π*h*(0.75 + (0.75 - 0.332/εeff1^1.73)*Wd1))*atan(ε*sqrt((εeff1 - 1)/(ε - εeff1)))/sqrt(ε - εeff1) = 1.31071e11
mc1 := 1 + 1.4/(1 + Wd1)*(0.15 - 0.235*exp(-0.45*f/Fpis1)) = 0.960369
mo1 := 1 + 1/(1 + sqrt(Wd1)) + 0.32*(1/(1 + sqrt(Wd1)))^3 = 1.47035  # Strip thinkness correction Wheeler
m1 := mo1*mc1 = 1.41208
ΔW11 := t/π*ln(4*e/sqrt((t/h)^2 + (1/π/(Wd1 + 1.10)))) = 3.78602e-5
εF1 := ε - (ε - εeff1)/(1 + (f/Fpis1)^m1) = 2.7002
ΔW21 := 1/2*ΔW11*(1 + 1/εF1) = 2.59407e-5
Lt1 := π/(sqrt(εF1)*2*π*f/с) = 0.00608137
λt1 := с/(f*sqrt(εF1)) = 0.0121627
Wt1 := Wd1*h - ΔW21 = 0.000449864
