с := 299792458
f := 15*10^9
εo := 8.85418782*10^-12
h := 0.3*10^-3
ε := 3.48
t := 35*10^-6
# Расчет согласующего трансформатора
R11 := 25.468
# Расчет компенсирующей индуктивности
XC11 := 21.511
Zt := sqrt(50*R11) = 35.6847
Zв := 100
# Quasistatic effective dielectric constant (Wheeler and Schneider)
BL := 377*π/(2*Zв*sqrt(ε)) = 3.17447
L11 := XC11/(2*π*f) = 2.28239e-10
Bt := 377*π/(2*Zt*sqrt(ε)) = 8.89589
WdL := 2/π*(BL - 1 - ln(2*BL - 1) + (ε - 1)/(2*ε)*(ln(BL - 1) + 0.39 - 0.61/ε)) = 0.541678
Wdt := 2/π*(Bt - 1 - ln(2*Bt - 1) + (ε - 1)/(2*ε)*(ln(Bt - 1) + 0.39 - 0.61/ε)) = 3.74828
εeffL := (ε + 1)/2 + (ε - 1)/2*1/sqrt(1 + 12*1/WdL) = 2.4977
εefft := (ε + 1)/2 + (ε - 1)/2*1/sqrt(1 + 12*1/Wdt) = 2.84495
# Dispersion effect (Kobayashi)
# Dispersion effect (Kobayashi)
FLpis := с/(2*π*h*(0.75 + (0.75 - 0.332/εeffL^1.73)*WdL))*atan(ε*sqrt((εeffL - 1)/(ε - εeffL)))/sqrt(ε - εeffL) = 1.92412e11
Fpis := с/(2*π*h*(0.75 + (0.75 - 0.332/εefft^1.73)*Wdt))*atan(ε*sqrt((εefft - 1)/(ε - εefft)))/sqrt(ε - εefft) = 8.34494e10
mссL := 1 + 1.4/(1 + WdL)*(0.15 - 0.235*exp(-0.45*f/FLpis)) = 0.930168
mc := 1 + 1.4/(1 + Wdt)*(0.15 - 0.235*exp(-0.45*f/Fpis)) = 0.980322
# Strip thinkness correction Wheeler
moL := 1 + 1/(1 + sqrt(WdL)) + 0.32*(1/(1 + sqrt(WdL)))^3 = 1.63721
mo := 1 + 1/(1 + sqrt(Wdt)) + 0.32*(1/(1 + sqrt(Wdt)))^3 = 1.35324
mСL := moL*mссL = 1.52288
m := mo*mc = 1.32661
ΔW1 := t/π*ln(4*e/sqrt((t/h)^2 + (1/π/(Wdt + 1.10)))) = 4.07061e-5
εFL := ε - (ε - εeffL)/(1 + (f/FLpis)^mСL) = 2.51746
εF := ε - (ε - εefft)/(1 + (f/Fpis)^m) = 2.90406
ΔW2 := 1/2*ΔW1*(1 + 1/εF) = 2.73615e-5
Wc := WdL*h = 0.000162503
Lt := π/2/(sqrt(εF)*2*π*f/с) = 0.00293202
lL := f*с/(f*sqrt(εFL))*L11/Zв = 0.00043125
λt := с/(f*sqrt(εF)) = 0.0117281
Wt := Wdt*h - ΔW2 = 0.00109712
# Taper (Kobayashi)
εtaper := (εF + εFL)/2 = 2.71076
Ltaper := 1/2*с/(f*εtaper) = 0.00368645
ltaper := Ltaper/10 = 0.000368645
Z1 := Zt*e^((ltaper/Ltaper)*ln(Zв/Zt)) = 39.558
w1 := 943.991*10^-6
Z2 := Zt*e^((ltaper*2/Ltaper)*ln(Zв/Zt)) = 43.8516
w2 := 807.179*10^-6
w3 := 685.091*10^-6
Z3 := Zt*e^((ltaper*3/Ltaper)*ln(Zв/Zt)) = 48.6114
Z4 := Zt*e^((ltaper*4/Ltaper)*ln(Zв/Zt)) = 53.8877
w4 := 576.289*10^-6
w5 := 479.474*10^-6
Z5 := Zt*e^((ltaper*5/Ltaper)*ln(Zв/Zt)) = 59.7367
w6 := 393.472*10^-6
Z6 := Zt*e^((ltaper*6/Ltaper)*ln(Zв/Zt)) = 66.2206
Z7 := Zt*e^((ltaper*7/Ltaper)*ln(Zв/Zt)) = 73.4082
w7 := 317.223*10^-6
w8 := 249.764*10^-6
Z8 := Zt*e^((ltaper*8/Ltaper)*ln(Zв/Zt)) = 81.376
w9 := 190.225*10^-6
Z9 := Zt*e^((ltaper*9/Ltaper)*ln(Zв/Zt)) = 90.2087
Z10 := Zt*e^((ltaper*10/Ltaper)*ln(Zв/Zt)) = 100
w10 := 137.811*10^-6
# Quasistatic effective dielectric constant (Wheeler and Schneider)
B1 := 377*π/(2*Z10*sqrt(ε)) = 3.17447
Wd1 := 2/π*(B1 - 1 - ln(2*B1 - 1) + (ε - 1)/(2*ε)*(ln(B1 - 1) + 0.39 - 0.61/ε)) = 0.541678
εeff1 := (ε + 1)/2 + (ε - 1)/2*1/sqrt(1 + 12*1/Wd1) = 2.4977
# Dispersion effect (Kobayashi)
Fpis1 := с/(2*π*h*(0.75 + (0.75 - 0.332/εeff1^1.73)*Wd1))*atan(ε*sqrt((εeff1 - 1)/(ε - εeff1)))/sqrt(ε - εeff1) = 1.92412e11
mc1 := 1 + 1.4/(1 + Wd1)*(0.15 - 0.235*exp(-0.45*f/Fpis1)) = 0.930168
mo1 := 1 + 1/(1 + sqrt(Wd1)) + 0.32*(1/(1 + sqrt(Wd1)))^3 = 1.63721  # Strip thinkness correction Wheeler
m1 := mo1*mc1 = 1.52288
ΔW11 := t/π*ln(4*e/sqrt((t/h)^2 + (1/π/(Wd1 + 1.10)))) = 3.53454e-5
εF1 := ε - (ε - εeff1)/(1 + (f/Fpis1)^m1) = 2.51746
ΔW21 := 1/2*ΔW11*(1 + 1/εF1) = 2.46927e-5
Lt1 := π/(sqrt(εF1)*2*π*f/с) = 0.00629822
λt1 := с/(f*sqrt(εF1)) = 0.0125964
Wt1 := Wd1*h - ΔW21 = 0.000137811
